OpenVSP model (file version 5), 4 components.
Geometry view with OpenVSP parameter names; values to 6 digits, angles in degrees, lengths in the model's unit.
Overall bounding box: X_Min=0 X_Len=1.2 Y_Min=-1 Y_Len=2 Z_Min=-0.1 Z_Len=0.3

Wing "Main_wing_NACA0012"
  location (X Y Z) 0.28 0 0, rotation 0 0 0
  symmetric about XZ
  bounding box size 0.25 2 0.0300136
  totals: TotalSpan=2 TotalProjectedSpan=2 TotalChord=0.25 TotalArea=0.5 TotalAR=8 MAC=0.25
  root: chord 0.25, twist 0, NACA 4-series Camber=0 CamberLoc=0.2 ThickChord=0.12
  sections:
    n  Span  Root_Chord  Tip_Chord  Area  Sweep  Sweep_Location  Dihedral  Twist  Twist_Location  tip airfoil
    1  1     0.25        0.25       0.25  0      0               0         0      0.25            as above

Wing "Horizontal_tail"
  location (X Y Z) 1 0 0, rotation 0 0 0
  symmetric about XZ
  bounding box size 0.13 0.55 0.0156071
  totals: TotalSpan=0.55 TotalProjectedSpan=0.55 TotalChord=0.13 TotalArea=0.0715 TotalAR=4.23077 MAC=0.13
  root: chord 0.13, twist 0, NACA 4-series Camber=0 CamberLoc=0.2 ThickChord=0.12
  sections:
    n  Span   Root_Chord  Tip_Chord  Area     Sweep  Sweep_Location  Dihedral  Twist  Twist_Location  tip airfoil
    1  0.275  0.13        0.13       0.03575  0      0               0         0      0.25            as above

Wing "Vertical_tail"
  location (X Y Z) 0.98 0 0, rotation 90 0 0
  bounding box size 0.18 0.0216098 0.2
  totals: TotalSpan=0.2 TotalProjectedSpan=0.2 TotalChord=0.135 TotalArea=0.027 TotalAR=1.48148 MAC=0.14
  root: chord 0.18, twist 0, NACA 4-series Camber=0 CamberLoc=0.2 ThickChord=0.12
  sections:
    n  Span  Root_Chord  Tip_Chord  Area   Sweep  Sweep_Location  Dihedral  Twist  Twist_Location  tip airfoil
    1  0.2   0.18        0.09       0.027  0      0               0         0      0.25            as above

Pod "Fuselage_visualization_only"
  location (X Y Z) 0 0 0, rotation 0 0 0
  bounding box size 1.2 0.2 0.2
  Design: FineRatio=12 Length=1.2
